# OpenSim document version 40000
MarkerSet:
  Marker ij: thorax (0 0 0)
  Marker c7: thorax (-0.0899063 0.0327569 0)
  Marker t8: thorax (-0.111155 -0.154433 0)
  Marker px: thorax (0.0697635 -0.164311 0)
  Marker ClavicleMassCenter: clavicle (-0.02172 0.01007 0.06704)
  Marker acc: clavicle (-0.028301 0.018552 0.117034)
  Marker sc: clavicle (0 0 0)
  Marker ScapulaMassCenter: scapula (-0.04612 -0.0319 -0.04565)
  Marker ScapulaThoracicContactPt: scapula (-0.05982 -0.03904 -0.056)
  Marker ac: scapula (-0.0119247 -0.00196687 -0.0176399)
  Marker ai: scapula (-0.115393 -0.116437 -0.0826482)
  Marker ts: scapula (-0.0921861 -0.00870938 -0.095417)
  Marker aa: scapula (-0.044807 -4.28397e-5 0.00490913)
  Marker HumerusMassCenter: humerus (0.00537 -0.11493 -0.00261)
  Marker gu: humerus (0 0 0)
  Marker EpL: humerus (0.00134695 -0.285625 0.022249)
  Marker EpM: humerus (0.00148415 -0.282015 -0.0446513)
  Marker centelbow: humerus (0.0009 -0.2842 -0.0097)
  Marker centijc7: thorax (-0.0415 0.0163 0)
  Marker centpxt8: thorax (-0.0207 -0.1601 0.0004)
  Marker ijc: clavicle (-0.00953974 -0.00184817 -0.0253392)
