# OpenSim document version 40000
MarkerSet:
  Marker ij: thorax (0 0 0) fixed=true
  Marker c7: thorax (-0.08990623 0.03275692 0) fixed=true
  Marker t8: thorax (-0.1111553 -0.1544322 0) fixed=true
  Marker px: thorax (0.06976344 -0.1643116 0) fixed=true
  Marker ClavicleMassCenter: clavicle (-0.02172004 0.01007002 0.06704027) fixed=true
  Marker acc: clavicle (-0.02830113 0.0185521 0.1170337) fixed=true
  Marker sc: clavicle (0 0 0) fixed=true
  Marker ScapulaMassCenter: scapula (-0.04611996 -0.03190012 -0.0456502) fixed=true
  Marker ScapulaThoracicContactPt: scapula (-0.05982004 -0.03904006 -0.0560002) fixed=true
  Marker ac: scapula (-0.01192471 -0.001966882 -0.01764) fixed=true
  Marker ai: scapula (-0.1153929 -0.1164373 -0.09102378) fixed=true
  Marker ts: scapula (-0.09218603 -0.002484038 -0.1058868) fixed=true
  Marker aa: scapula (-0.04480688 0.003469836 0.01724282) fixed=true
  Marker HumerusMassCenter: humerus (0.005370027 -0.1149298 -0.00260999) fixed=true
  Marker gu: humerus (0 0 0) fixed=true
  Marker EpL: humerus (0.001346959 -0.2856254 0.0222489) fixed=true
  Marker EpM: humerus (0.001484159 -0.2820152 -0.0446511) fixed=true
  Marker centelbow: humerus (0.0009000026 -0.2841993 -0.009699949) fixed=true
  Marker centijc7: thorax (-0.04149992 0.01630006 0) fixed=true
  Marker centpxt8: thorax (-0.02069991 -0.1600994 0.0003999989) fixed=true
  Marker ijc: clavicle (-0.009539818 -0.00184817 -0.02533929) fixed=true
