# OpenSim document version 40000
MarkerSet:
  Marker SS: thorax (0.02476317 0.001974476 -0.001250291) fixed=true
  Marker XP: thorax (0.0780721 -0.1591144 -0.00307544) fixed=true
  Marker C7: thorax (-0.1048992 0.0317836 0.0004852197) fixed=true
  Marker L5: thorax (-0.06751168 -0.3626312 0.002045101) fixed=true
  Marker LPSIS: thorax (-0.07753578 -0.3944755 -0.03203784)
  Marker RPSIS: thorax (-0.07830307 -0.395028 0.03675121)
  Marker ACR: scapula (-0.04120989 0.02352912 0.00239379) fixed=true
  Marker LE: humerus (-5.769793e-5 -0.2880143 0.0344381) fixed=true
  Marker ME: humerus (-0.0005315155 -0.2777194 -0.05789053) fixed=true
  Marker US: ulna (-0.007715866 -0.2472733 0.06022027) fixed=true
  Marker RS: radius (0.06077165 -0.2308837 0.01768581) fixed=true
  Marker UA1: humerus (0.006194924 -0.1853092 0.03415773)
  Marker UA2: humerus (-0.0004074562 -0.1505107 0.04484448)
  Marker UA3: humerus (0.03195921 -0.1515638 0.03289589)
  Marker FA1: radius (0.001364469 -0.07385047 -0.03416362)
  Marker FA2: radius (0.02031332 -0.04842784 -0.03826316)
  Marker FA3: radius (-0.01136049 -0.04114922 -0.04503999)
