# OpenSim document version 40000
MarkerSet:
  Marker ijc: thorax (0.0226136 -0.01457947 0.0001861348) fixed=true
  Marker Right_clav_sternum: clavicle (0.01976527 0.00285552 0.002661527) fixed=true
  Marker Left_clav_sternum: thorax (0.02409645 0.00473708 -0.02890105) fixed=true
  Marker px: thorax (0.07918624 -0.1559826 -0.002279525) fixed=true
  Marker l3: thorax (-0.07406899 -0.3380046 0.0007414274) fixed=true
  Marker c7: thorax (-0.09648728 0.06008837 0.0009453819) fixed=true
  Marker Right_Acr_Z: scapula (-0.01054507 0.08570363 -0.006854584)
  Marker Right_Acr_Y: scapula (0.007674643 0.0524227 0.02154867)
  Marker Right_Acr_X: scapula (-0.04881206 0.05405877 0.01761956)
  Marker Right_Acr_Base: scapula (-0.006463413 0.01841841 -0.01319822) fixed=true
  Marker Olecranon: ulna (-0.04697747 -0.01921317 0.0036523) fixed=true
  Marker aa: scapula (-0.05237314 0.003302736 0.009503759) fixed=true
  Marker ai: scapula (-0.1153929 -0.1164373 -0.09102378) fixed=true
  Marker ts: scapula (-0.09218603 -0.002484038 -0.1058868) fixed=true
  Marker Right_Rib10: thorax (0.06026866 -0.2601989 0.134995) fixed=true
  Marker Left_Rib10: thorax (0.04273767 -0.2652159 -0.1420081) fixed=true
  Marker GT: humerus (-0.02129248 -0.06530572 0.01037981)
  Marker Virtual_ijc: thorax (-0.1238247 -0.03966028 0.00628656) fixed=true
  Marker Virtual_px: thorax (-0.1128405 -0.1912398 0.002821591) fixed=true
  Marker EpL: humerus (0.01851355 -0.2862772 0.02790615) fixed=true
  Marker EpM: humerus (0.0006640815 -0.2799982 -0.05888425) fixed=true
  Marker Lateral_Styloid: radius (0.05694368 -0.2380142 0.02105691) fixed=true
  Marker Medial_Styloid: ulna (-0.004828634 -0.2392582 0.06402396) fixed=true
