# OpenSim document version 40000
InverseKinematicsTool:
  time_range: 0 100
  IKTaskSet:
    IKMarkerTask SS: apply=true weight=1
    IKMarkerTask XP: apply=true weight=1
    IKMarkerTask C7: apply=true weight=1
    IKMarkerTask L5: apply=true weight=1
    IKMarkerTask LPSIS: apply=true weight=0.5
    IKMarkerTask RPSIS: apply=true weight=0.5
    IKMarkerTask ACR: apply=true weight=1
    IKMarkerTask LE: apply=true weight=1
    IKMarkerTask ME: apply=true weight=1
    IKMarkerTask US: apply=true weight=1
    IKMarkerTask RS: apply=true weight=1
    IKMarkerTask UA1: apply=true weight=0.5
    IKMarkerTask UA2: apply=true weight=0.5
    IKMarkerTask UA3: apply=true weight=0.5
