# OpenSim document version 40000
ScaleTool ThoracoscapularShoulderModel_preScaled:
  mass: 24.67874 [kg]
  height: -1
  age: -1
  ModelScaler:
    apply: true
    scaling_order: measurements
    time_range: 5 6.5
    preserve_mass_distribution: true
    output_scale_file: scale_factors_preScaling_Clark.txt
    MeasurementSet:
      Measurement thorax_x: apply=true
        MarkerPair: markers=(SS C7)
        BodyScale thorax: axes=X
      Measurement thorax_y: apply=true
        MarkerPair: markers=(C7 L5)
        BodyScale thorax: axes=Y
      Measurement thorax_z: apply=true
        MarkerPair: markers=(SS ACR)
        BodyScale thorax: axes=Z
      Measurement clavicle: apply=true
        MarkerPair: markers=(SS ACR)
        BodyScale clavicle: axes=(X Y Z)
      Measurement scapula_x: apply=true
        MarkerPair: markers=(ACR ME)
        MarkerPair: markers=(ACR LE)
        BodyScale scapula: axes=X
      Measurement scapula_y: apply=true
        MarkerPair: markers=(ACR ME)
        MarkerPair: markers=(ACR LE)
        BodyScale scapula: axes=Y
      Measurement humerus: apply=true
        MarkerPair: markers=(ACR ME)
        MarkerPair: markers=(ACR LE)
        BodyScale humerus: axes=(X Y Z)
      Measurement forearm_uniform: apply=true
        MarkerPair: markers=(US ME)
        MarkerPair: markers=(RS LE)
        BodyScale radius: axes=(X Y Z)
        BodyScale ulna: axes=(X Y Z)
  MarkerPlacer:
    apply: true
    time_range: 0.01 0.1
    max_marker_movement: -1
    IKTaskSet:
      IKMarkerTask SS: apply=true weight=1
      IKMarkerTask XP: apply=true weight=1
      IKMarkerTask C7: apply=true weight=1
      IKMarkerTask L5: apply=true weight=1
      IKMarkerTask ACR: apply=true weight=1
      IKMarkerTask LE: apply=true weight=1
      IKMarkerTask ME: apply=true weight=1
      IKMarkerTask US: apply=true weight=1
      IKMarkerTask RS: apply=true weight=1
      IKMarkerTask MCP5: apply=true weight=1
      IKMarkerTask MCP2: apply=true weight=1
      IKMarkerTask LPSIS: apply=true weight=1
      IKMarkerTask RPSIS: apply=true weight=1
      IKMarkerTask UA1: apply=true weight=1
      IKMarkerTask UA2: apply=true weight=1
      IKMarkerTask UA3: apply=true weight=1
      IKMarkerTask FA1: apply=true weight=1
      IKMarkerTask FA2: apply=true weight=1
      IKMarkerTask FA3: apply=true weight=1
