# OpenSim document version 40000
# This IKSetup allows to take into account longer time ranges
InverseKinematicsTool:
  time_range: 0 1000
  results_directory: ./
  constraint_weight: Inf
  accuracy: 1e-5
  report_errors: true
  report_marker_locations: false
  IKTaskSet:
    IKMarkerTask ijc: apply=true weight=1
    IKMarkerTask sc: apply=true weight=1
    IKMarkerTask px: apply=true weight=1
    IKMarkerTask t8: apply=true weight=1
    IKMarkerTask c7: apply=true weight=1
    IKMarkerTask aa: apply=true weight=0
    IKMarkerTask ai: apply=true weight=0
    IKMarkerTask ts: apply=true weight=0
    IKMarkerTask EpL: apply=true weight=1
    IKMarkerTask EpM: apply=true weight=1
    IKMarkerTask HumerusMassCenter: apply=true weight=1
    IKMarkerTask ScapulaMassCenter: apply=true weight=1
    IKMarkerTask ScapulaThoracicContactPt: apply=true weight=1
    IKMarkerTask gu: apply=true weight=1
    IKMarkerTask centelbow: apply=true weight=1
    IKMarkerTask centijc7: apply=true weight=1
    IKMarkerTask centpxt8: apply=true weight=0
    IKMarkerTask ij: apply=true weight=0
