# OpenSim document version 40000
InverseKinematicsTool:
  time_range: 0 100
  marker_file: Code_Ajay/trc_for_scaling/AjayStandford2015/flxbonepin.trc
  IKTaskSet:
    IKMarkerTask ij: apply=true weight=1
    IKMarkerTask acc: apply=true weight=1
    IKMarkerTask ac: apply=true weight=1
    IKMarkerTask ai: apply=true weight=1
    IKMarkerTask ts: apply=true weight=1
    IKMarkerTask gu: apply=true weight=1
    IKMarkerTask EpL: apply=true weight=1
    IKMarkerTask centelbow: apply=true weight=1
    IKMarkerTask centijc7: apply=true weight=1
    IKMarkerTask centpxt8: apply=true weight=1
    IKMarkerTask ijc: apply=true weight=1
