# OpenSim document version 40000
# This ScaleSetup does not use the following markers for IK solve: aa, ai, ts
# since those are not accurate bony markers and might corrupt the solution
ScaleTool ThoracoscapularShoulderModel_scaled:
  mass: 24.96447 [kg]
  height: -1
  age: -1
  ModelScaler:
    apply: true
    scaling_order: manualScale
    time_range: 0 100
    preserve_mass_distribution: true
    ScaleSet:
      Scale: scales=(1 1 1) segment=thorax apply=true
      Scale: scales=(1 1 1) segment=clavicle apply=true
      Scale: scales=(1 1 1) segment=scapula apply=true
      Scale: scales=(1 1 1) segment=humerus apply=true
      Scale: scales=(1 1 1) segment=ulna apply=true
      Scale: scales=(1 1 1) segment=radius apply=true
  MarkerPlacer:
    apply: false
    time_range: 0 100
    max_marker_movement: -1
    IKTaskSet:
      IKMarkerTask ijc: apply=true weight=1
      IKMarkerTask px: apply=true weight=1
      IKMarkerTask c7: apply=true weight=1
      IKMarkerTask l3: apply=true weight=1
      IKMarkerTask Right_Acr_Base: apply=true weight=1
      IKMarkerTask ai: apply=true weight=0
      IKMarkerTask ts: apply=true weight=0
      IKMarkerTask aa: apply=true weight=0
      IKMarkerTask EpL: apply=true weight=1
      IKMarkerTask EpM: apply=true weight=1
      IKMarkerTask Medial_Styloid: apply=true weight=1
      IKMarkerTask Lateral_Styloid: apply=true weight=1
      IKMarkerTask Olecranon: apply=true weight=1
      IKMarkerTask Right_Rib10: apply=true weight=1
      IKMarkerTask Left_Rib10: apply=true weight=1
