# OpenSim document version 40000
ScaleTool ThoracoscapularShoulderModel_preScaled:
  mass: 24.67874 [kg]
  height: -1
  age: -1
  GenericModelMaker:
    marker_set_file: Marker Set/TSM_marker_set_AjayStandford2015_DSEM.xml
  ModelScaler:
    apply: true
    scaling_order: measurements
    marker_file: trc_for_scaling/AjayStandford2015/preliminary_static_pose/flxbonepinstatic.trc
    time_range: 0 1.99
    preserve_mass_distribution: true
    output_scale_file: scale_factors_preScaling_AjayStandford2015.txt
    MeasurementSet:
      Measurement thorax_x: apply=true
        MarkerPair: markers=(ij centijc7)
        BodyScale thorax: axes=X
      Measurement thorax_y: apply=true
        MarkerPair: markers=(centijc7 centpxt8)
        BodyScale thorax: axes=(Y Z)
      Measurement clavicle: apply=true
        MarkerPair: markers=(ijc ac)
        BodyScale clavicle: axes=(X Y Z)
      Measurement scapula_x: apply=true
        MarkerPair: markers=(ac ts)
        BodyScale scapula: axes=X
      Measurement scapula_y: apply=true
        MarkerPair: markers=(ts ai)
        BodyScale scapula: axes=Y
      Measurement scapula_z: apply=true
        MarkerPair: markers=(ts ac)
        BodyScale scapula: axes=Z
      Measurement arm_uniform: apply=true
        MarkerPair: markers=(gu EpL)
        BodyScale humerus: axes=(X Y Z)
        BodyScale ulna: axes=(X Y Z)
        BodyScale radius: axes=(X Y Z)
  MarkerPlacer:
    apply: false
    marker_file: trc_for_scaling/AjayStandford2015/preliminary_static_pose/flxbonepinstatic.trc
    time_range: 0 0.1
    max_marker_movement: 0
    IKTaskSet:
      IKMarkerTask ijc: apply=true weight=1
      IKMarkerTask sc: apply=false weight=1
      IKMarkerTask px: apply=false weight=1
      IKMarkerTask t8: apply=false weight=1
      IKMarkerTask c7: apply=false weight=1
      IKMarkerTask aa: apply=false weight=1
      IKMarkerTask ai: apply=true weight=1
      IKMarkerTask ts: apply=true weight=1
      IKMarkerTask EpL: apply=true weight=1
      IKMarkerTask EpM: apply=false weight=1
      IKMarkerTask HumerusMassCenter: apply=false weight=1
      IKMarkerTask ScapulaMassCenter: apply=false weight=1
      IKMarkerTask ScapulaThoracicContactPt: apply=false weight=1
      IKMarkerTask gu: apply=true weight=1
      IKMarkerTask centelbow: apply=true weight=1
      IKMarkerTask centijc7: apply=true weight=1
      IKMarkerTask centpxt8: apply=true weight=1
      IKMarkerTask ij: apply=true weight=1
      IKMarkerTask acc: apply=true weight=1
      IKMarkerTask ac: apply=true weight=1
