# OpenSim document version 40000
ScaleTool ThoracoscapularShoulderModel_preScaled:
  mass: 24.67874 [kg]
  height: -1
  age: -1
  GenericModelMaker:
    marker_set_file: ../../Marker Set/TSM_marker_set_AjayStandford2019.xml
  ModelScaler:
    apply: true
    scaling_order: measurements
    marker_file: ../../trc_for_scaling/AjayStandford2019/FLX01.trc
    time_range: 0 0.6
    preserve_mass_distribution: true
    output_scale_file: scale_factors_preScaling_AjayStandford2015.txt
    MeasurementSet:
      Measurement thorax_x: apply=true
        MarkerPair: markers=(ij centijc7)
        BodyScale thorax: axes=X
      Measurement thorax_y: apply=true
        MarkerPair: markers=(centijc7 centpxt8)
        BodyScale thorax: axes=(Y Z)
      Measurement clavicle: apply=true
        MarkerPair: markers=(ij aa)
        BodyScale clavicle: axes=(X Y Z)
      Measurement scapula_x: apply=true
        MarkerPair: markers=(aa ts)
        BodyScale scapula: axes=X
      Measurement scapula_y: apply=true
        MarkerPair: markers=(ts ai)
        BodyScale scapula: axes=Y
      Measurement scapula_z: apply=true
        MarkerPair: markers=(ts aa)
        BodyScale scapula: axes=Z
      Measurement arm_uniform: apply=true
        MarkerPair: markers=(gu centelbow)
        BodyScale humerus: axes=(X Y Z)
        BodyScale ulna: axes=(X Y Z)
        BodyScale radius: axes=(X Y Z)
  MarkerPlacer:
    apply: true
    marker_file: ../../trc_for_scaling/AjayStandford2019/FLX01.trc
    time_range: 0 0.1
    max_marker_movement: -1
    IKTaskSet:
      IKMarkerTask ij: apply=true weight=1
      IKMarkerTask ai: apply=true weight=1
      IKMarkerTask ts: apply=true weight=1
      IKMarkerTask aa: apply=true weight=1
      IKMarkerTask gu: apply=true weight=1
      IKMarkerTask EpL: apply=true weight=1
      IKMarkerTask centelbow: apply=true weight=1
      IKMarkerTask centijc7: apply=true weight=1
      IKMarkerTask centpxt8: apply=true weight=1
