# OpenSim document version 40000
# This IKSetup allows to take into account longer time ranges
InverseKinematicsTool:
  time_range: 0 1000
  results_directory: ./
  constraint_weight: Inf
  accuracy: 1e-5
  report_errors: true
  report_marker_locations: false
  IKTaskSet:
    IKMarkerTask c7: apply=true weight=1
    IKMarkerTask l3: apply=true weight=1
    IKMarkerTask px: apply=true weight=1
    IKMarkerTask Right_Acr_Z: apply=true weight=1
    IKMarkerTask ai: apply=true weight=0
    IKMarkerTask ts: apply=true weight=0
    IKMarkerTask aa: apply=true weight=0
    IKMarkerTask EpL: apply=true weight=1
    IKMarkerTask EpM: apply=true weight=1
    IKMarkerTask ijc: apply=true weight=1
    IKMarkerTask Medial_Styloid: apply=true weight=1
    IKMarkerTask Lateral_Styloid: apply=true weight=1
    IKMarkerTask Olecranon: apply=true weight=1
    IKMarkerTask Right_Acr_Y: apply=true weight=1
    IKMarkerTask Right_Acr_X: apply=true weight=1
    IKMarkerTask GT: apply=true weight=0
    IKMarkerTask Right_clav_sternum: apply=true weight=1
    IKMarkerTask Left_clav_sternum: apply=true weight=0.5
    IKMarkerTask Right_Rib10: apply=true weight=1
    IKMarkerTask Left_Rib10: apply=true weight=1
    IKMarkerTask Virtual_ijc: apply=true weight=1
    IKMarkerTask Virtual_px: apply=true weight=1
    IKMarkerTask Right_Acr_Base: apply=true weight=1
