# OpenSim document version 40000
ScaleTool ThoracoscapularShoulderModel_preScaled:
  mass: 24.67874 [kg]
  height: -1
  age: -1
  GenericModelMaker:
    marker_set_file: Marker Set/TSM_marker_set_TUD_2021.xml
  ModelScaler:
    apply: true
    scaling_order: measurements
    marker_file: trc_for_scaling/preliminary_static_pose/ThumbsUp_3_45degrees.trc
    time_range: 0 1
    preserve_mass_distribution: true
    output_scale_file: scale_factors_preScaling.txt
    MeasurementSet:
      Measurement thorax_x: apply=true
        MarkerPair: markers=(px Virtual_px)
        MarkerPair: markers=(ijc Virtual_ijc)
        BodyScale thorax: axes=X
      Measurement thorax_y: apply=true
        MarkerPair: markers=(Virtual_ijc Virtual_px)
        MarkerPair: markers=(ijc px)
        BodyScale thorax: axes=Y
      Measurement thorax_z: apply=true
        MarkerPair: markers=(Right_Rib10 Left_Rib10)
        MarkerPair: markers=(Right_clav_sternum Left_clav_sternum)
        BodyScale thorax: axes=Z
      Measurement clavicle: apply=true
        MarkerPair: markers=(Right_Acr_Base Right_clav_sternum)
        BodyScale clavicle: axes=(X Y Z)
      Measurement scapula_x: apply=true
        MarkerPair: markers=(Right_Acr_Base ts)
        BodyScale scapula: axes=X
      Measurement scapula_y: apply=true
        MarkerPair: markers=(ts ai)
        BodyScale scapula: axes=Y
      Measurement scapula_z: apply=true
        MarkerPair: markers=(ts aa)
        BodyScale scapula: axes=Z
      Measurement humerus: apply=true
        MarkerPair: markers=(Right_Acr_Base EpM)
        MarkerPair: markers=(Right_Acr_Base EpL)
        BodyScale humerus: axes=(X Y Z)
      Measurement ulna: apply=true
        MarkerPair: markers=(Lateral_Styloid EpL)
        MarkerPair: markers=(Medial_Styloid EpM)
        BodyScale ulna: axes=(X Y Z)
      Measurement radius: apply=true
        MarkerPair: markers=(Lateral_Styloid EpL)
        MarkerPair: markers=(Medial_Styloid EpM)
        BodyScale radius: axes=(X Y Z)
  MarkerPlacer:
    apply: true
    marker_file: trc_for_scaling/preliminary_static_pose/ThumbsUp_3_45degrees.trc
    time_range: 0 1
    max_marker_movement: -1
    IKTaskSet:
      IKMarkerTask ijc: apply=true weight=1
      IKMarkerTask Right_clav_sternum: apply=true weight=1
      IKMarkerTask Left_clav_sternum: apply=true weight=1
      IKMarkerTask px: apply=true weight=1
      IKMarkerTask l3: apply=true weight=1
      IKMarkerTask c7: apply=true weight=1
      IKMarkerTask Right_Acr_Z: apply=false weight=1
      IKMarkerTask Right_Acr_Y: apply=false weight=1
      IKMarkerTask Right_Acr_X: apply=false weight=1
      IKMarkerTask Right_Acr_Base: apply=true weight=1
      IKMarkerTask Olecranon: apply=true weight=1
      IKMarkerTask aa: apply=true weight=0.7
      IKMarkerTask ai: apply=true weight=0.7
      IKMarkerTask ts: apply=true weight=0.7
      IKMarkerTask Right_Rib10: apply=true weight=1
      IKMarkerTask Left_Rib10: apply=true weight=1
      IKMarkerTask GT: apply=true weight=0.7
      IKMarkerTask Virtual_ijc: apply=true weight=1
      IKMarkerTask Virtual_px: apply=true weight=1
      IKMarkerTask EpL: apply=true weight=1
      IKMarkerTask EpM: apply=true weight=1
      IKMarkerTask Lateral_Styloid: apply=true weight=1
      IKMarkerTask Medial_Styloid: apply=true weight=1
