# OpenSim document version 40000
InverseKinematicsTool:
  time_range: 0 100
  IKTaskSet:
    IKMarkerTask ij: apply=true weight=1
    IKMarkerTask ai: apply=true weight=0.3
    IKMarkerTask ts: apply=true weight=0.3
    IKMarkerTask aa: apply=true weight=0.3
    IKMarkerTask gu: apply=true weight=0.5
    IKMarkerTask EpL: apply=true weight=1
    IKMarkerTask centelbow: apply=true weight=1
    IKMarkerTask centijc7: apply=true weight=1
    IKMarkerTask centpxt8: apply=true weight=1
    IKCoordinateTask scapula_abduction: apply=true weight=0 value_type=manual_value value=0
    IKCoordinateTask scapula_elevation: apply=true weight=0 value_type=manual_value value=0
    IKCoordinateTask scapula_upward_rot: apply=true weight=0 value_type=manual_value value=0
    IKCoordinateTask scapula_winging: apply=true weight=0 value_type=manual_value value=0
