# OpenSim document version 40000
InverseKinematicsTool:
  results_directory: C:\Users\italobelli\Desktop\GitHub\PTbot_officialCBL\Personal_Results
  time_range: 0 100
  output_motion_file: C:\Users\italobelli\Desktop\GitHub\PTbot_officialCBL\Personal_Results\SHRUG23.trc.mot
  report_errors: true
  marker_file: C:\Users\italobelli\Desktop\GitHub\PTbot_officialCBL\ExperimentalData\Markers\SHRUG23.trc
  IKTaskSet:
    IKMarkerTask ij: apply=true weight=1
    IKMarkerTask ai: apply=true weight=0.5
    IKMarkerTask ts: apply=true weight=0.5
    IKMarkerTask aa: apply=true weight=0.5
    IKMarkerTask gu: apply=true weight=1
    IKMarkerTask EpL: apply=true weight=1
    IKMarkerTask centelbow: apply=true weight=1
    IKMarkerTask centijc7: apply=true weight=1
    IKMarkerTask centpxt8: apply=true weight=1
    IKCoordinateTask scapula_abduction: apply=true weight=0.0001 value_type=manual_value value=-0.3115611
    IKCoordinateTask scapula_elevation: apply=true weight=0.0001 value_type=manual_value value=-0.05049787
    IKCoordinateTask scapula_upward_rot: apply=true weight=0.0002 value_type=manual_value value=0.2082049
    IKCoordinateTask scapula_winging: apply=true weight=0.0001 value_type=manual_value value=0.2735852
