# OpenSim document version 40000
ForceSet ThoracoscapularShoulder:
  CoordinateActuator thor_rot_x: coordinate=ground_thorax_rot_x optimal_force=1000
  CoordinateActuator thor_rot_y: coordinate=ground_thorax_rot_y optimal_force=1000
  CoordinateActuator thor_rot_z: coordinate=ground_thorax_rot_z optimal_force=1000
  CoordinateActuator scap_abd: coordinate=scapula_abduction optimal_force=1
  CoordinateActuator scap_elv: coordinate=scapula_elevation optimal_force=1
  CoordinateActuator scap_up_rot: coordinate=scapula_upward_rot optimal_force=1
  CoordinateActuator scap_wing: coordinate=scapula_winging optimal_force=2
  CoordinateActuator plane_elv_res: coordinate=plane_elv optimal_force=1
  CoordinateActuator shoulder_elv_res: coordinate=shoulder_elv optimal_force=1
  CoordinateActuator axial_rot_res: coordinate=axial_rot optimal_force=1
