# OpenSim document version 40000
CMC_TaskSet abduction:
  CMC_Joint [values shared by the 9 below unless stated]: weight=(1 1 1) wrt_body=-1 express_body=-1
      active=(true false false) kp=(100 1 1) kv=(20 1 1) ka=(1 1 1) r0=(0 0 0) r1=(0 0 0) r2=(0 0 0) limit=0
  CMC_Joint ground_thorax_rot_x: coordinate=ground_thorax_rot_x
  CMC_Joint ground_thorax_rot_y: coordinate=ground_thorax_rot_y
  CMC_Joint ground_thorax_rot_z: coordinate=ground_thorax_rot_z
  CMC_Joint scapula_abduction: coordinate=scapula_abduction
  CMC_Joint scapula_elevation: weight=(5 1 1) coordinate=scapula_elevation
  CMC_Joint scapula_upward_rot: coordinate=scapula_upward_rot
  CMC_Joint plane_elv: coordinate=plane_elv
  CMC_Joint shoulder_elv: coordinate=shoulder_elv
  CMC_Joint axial_rot: coordinate=axial_rot
